*Heading
** Job name: darcy Model name: Model-1
** Generated by: Abaqus/CAE 2021
*Preprint, echo=NO, model=NO, history=NO, contact=NO
**
** PARTS
**
*Part, name=Part-3
*Node
      1,   1.42105258,           0.
      2,   1.34210527,           0.
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*Element, type=CPE4RP
   1,  607,  962,  762,   19
   2,  762,  962, 1064,  158
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*Nset, nset=Set-1, generate
    1,  2828,     1
*Elset, elset=Set-1, generate
    1,  2637,     1
** Section: Section-1
*Solid Section, elset=Set-1, material=Material-1
,
*End Part
**
**
** ASSEMBLY
**
*Assembly, name=Assembly
**
*Instance, name=Part-3-1, part=Part-3
*End Instance
**
*Nset, nset=Set-10, instance=Part-3-1
 151, 152, 153, 154, 155, 156, 157, 755, 756, 757, 758, 759, 760, 761
*Elset, elset=Set-10, instance=Part-3-1
   25,   50,   70,   93,  118,  143, 1061, 1062, 1063, 1065, 1066, 1067, 1108
*Nset, nset=Set-11, instance=Part-3-1
  61,  62,  63,  64,  65,  66,  67, 655, 656, 657, 658, 659, 660, 661
*Elset, elset=Set-11, instance=Part-3-1
 381, 422, 446, 471, 472, 496, 521, 980, 981, 982, 983, 984, 985
*Nset, nset=Set-10_PP_, internal, instance=Part-3-1
 151, 152, 153, 154, 155, 156, 157, 755, 756, 757, 758, 759, 760, 761
*Nset, nset=Set-11_PP_, internal, instance=Part-3-1
  61,  62,  63,  64,  65,  66,  67, 655, 656, 657, 658, 659, 660, 661
*End Assembly
**
** MATERIALS
**
*Material, name=Material-1
*Density
2.,
*Elastic
 1e+10, 0.3
*Permeability, specific=9.81
 0.0101937,1.
*Porous Bulk Moduli
0., 2.2e+06
**
** BOUNDARY CONDITIONS
**
** Name: BC-3 Type: Displacement/Rotation
*Boundary
Part-3-1.Set-1, 1, 1
Part-3-1.Set-1, 2, 2
Part-3-1.Set-1, 6, 6
**
** PREDEFINED FIELDS
**
** Name: Predefined Field-1   Type: Void ratio
*Initial Conditions, TYPE=RATIO
Part-3-1.Set-1, 1.
** ----------------------------------------------------------------
**
** STEP: Step-1
**
*Step, name=Step-1, nlgeom=NO
*Soils, utol=1.0
1., 1., 1e-05, 1.,
**
** BOUNDARY CONDITIONS
**
** Name: BC-1 Type: Pore pressure
*Boundary
Set-10_PP_, 8, 8, 98.1
** Name: BC-2 Type: Pore pressure
*Boundary
Set-11_PP_, 8, 8
**
** LOADS
**
** Name: Load-1   Type: Gravity
*Dload
, GRAV, 9.81, 0., -1.
**
** OUTPUT REQUESTS
**
*Restart, write, frequency=0
**
** FIELD OUTPUT: F-Output-1
**
*Output, field, frequency=99999
*Node Output
COORD, POR
*Element Output, directions=YES
FLUVR, FLVEL, HP, P
**
** HISTORY OUTPUT: H-Output-1
**
*Output, history, variable=PRESELECT
*End Step
