*Heading
** Job name: cylinder Model name: Model-1
** Generated by: Abaqus/CAE 2021
*Preprint, echo=NO, model=NO, history=NO, contact=NO
**
** PARTS
**
*Part, name=Part-1
*Node
      1,  0.191388071, 0.0580569357,           0.
      2,  0.176384255, 0.0942793489,           0.
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*Element, type=C3D8R
    1,   557,   556,   639,   640,    55,    54,   137,   138
    2,   519,   554,   641,   637,    17,    52,   139,   135
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*Nset, nset=ALL, generate
     1,  15562,      1
*Elset, elset=ALL, generate
     1,  14070,      1
** Section: Section-1
*Solid Section, elset=ALL, material=Material-1
,
*End Part
**
**
** ASSEMBLY
**
*Assembly, name=Assembly
**
*Instance, name=Part-1-1, part=Part-1
*End Instance
**
*Nset, nset=Set-1, instance=Part-1-1, generate
   1,  502,    1
*Elset, elset=Set-1, instance=Part-1-1, generate
   1,  469,    1
*Nset, nset=Set-2, instance=Part-1-1, generate
 15061,  15562,      1
*Elset, elset=Set-2, instance=Part-1-1, generate
 13602,  14070,      1
*End Assembly
**
** MATERIALS
**
*Material, name=Material-1
*Density
1.,
*Elastic
5000., 0.3
**
** BOUNDARY CONDITIONS
**
** Name: BC-1 Type: Displacement/Rotation
*Boundary
Set-1, 1, 1
Set-1, 2, 2
Set-1, 3, 3
** ----------------------------------------------------------------
**
** STEP: Step-1
**
*Step, name=Step-1, nlgeom=NO
*Static
1., 1., 1e-05, 1.
**
** BOUNDARY CONDITIONS
**
** Name: BC-2 Type: Displacement/Rotation
*Boundary
Set-2, 1, 1
Set-2, 2, 2
Set-2, 3, 3, -0.1
**
** OUTPUT REQUESTS
**
*Restart, write, frequency=0
**
** FIELD OUTPUT: F-Output-2
**
*Output, field
*Node Output, nset=Part-1-1.ALL
COORD, U
*Element Output, elset=Part-1-1.ALL, directions=YES
S,
**
** HISTORY OUTPUT: H-Output-1
**
*Output, history, variable=PRESELECT
*End Step
